Given
(d^2/dt^2(y(t))) - 2*t*(d/dt(y(t))) + y(t)*|y(t)| == 0
y(0) == 1
t := 0, 0.05 .. 2
y'(0) == -0.7
Sol := Odesolve(t, 2, 50)
d^2/dt^2(y(t)) == 2*t*(d/dt(y(t))) - y(t)*|y(t)|
y := [1; -0.7]
D(t, y) := [y[1]; 2*t*y[1] - y[0]*|y[0]|]
res := rkfixed(y, 0, 2, 20, D)
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(d^2/dt^2(y(t))) - 2*t*(d/dt(y(t))) + y(t)*|y(t)| == 0
y := 2
N := 50
h := 0.2
f(z) := rkfixed([2; z], 0, 2, N, D)[N, 1]
f(-2) = -4.62939
z := -2
Given
f(z) == -4
z := Find(z) = -2.15021
bc := rkfixed([2; z], 0, 2, 20, D)
Given
(d^2/dt^2(y(t))) - 2*t*(d/dt(y(t))) + y(t)*|y(t)| == 0
y(0) == 2
y(2) == -4
Sol := Odesolve(t, 2, 50)
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h := 2/50
d^2/dx^2(y(x)) - (3 + 1)*x*(d/dx(y)) + (1*x^2)*y(x) == 0
i := 0 .. 50
x[i] := i*h
y(0) == 2
y[i] := y(x[i])  # error: This value must be a function, but has the form: Unitless.
y(2) == 0
T[i] := (y[i - 1] - y[i + 1])/2h  # error: This variable is undefined.
Y[i] := (T[i - 1] - T[i + 1])/2h  # error: This variable is undefined.
i := [□; □; □]  # error: This placeholder is empty.
C[i] := if(i ≠ 0, if(i == 50, [0, i[0], i[1]], [i[0], i[1], i[2]]), [i[1], i[2], 0])  # error: This value must be a vector.
Progonka(C, b) :=
    n ← last(b)
    [(β[0] ← b[0]/C[0, 1]), (α[0] ← C[0, 2]/C[0, 1])]
    for k ∈ 1 .. n
        d ← (C[k, 1] - C[k, 0]*α[k - 1])^-1
        [(α[k] ← C[k, 2]*d), (β[k] ← (b[k] - C[k, 0]*β[k - 1])*d)]
    for k ∈ n - 1 .. 0
        β[k] ← β[k] - α[k]*β[k + 1]
    β
